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/batch
! ANSYS input file written by Workbench version 2025 R1
! File used for geometry attach: C:\Users\carlo\Documents\Trabajo\Máster Ingeniería Industrial\Ansys\TFM\Modelo\TFM_V2.stp
/title,V2--Static Structural (D5)
/COM,/COM,     ANSYSMotion, 2025.1

/com,--- Data in consistent NMM units. See Solving Units in the help system for more information.
/units,MPA
/prep7
! Turn off shape checking because checks already performed inside WB mesher.
! See help system for more information.
SHPP,OFF,,NOWARN
etcon,set             ! allow ANSYS to choose best KEYOP's for 180x elements, resets any applicable keyopt to MAPDL defaults
/com,*********** Nodes for the whole assembly ***********
nblock,3,,48746
(1i9,3e20.9e3)
        1     1.827653137E+02    -5.547000000E+02     6.698596755E-15
        2     1.827653137E+02    -4.453000000E+02     0.000000000E+00
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-1
/com,*********** Nodes for all Remote Points ***********
nblock,3
(1i9,3e20.9e3)
    44316     1.403908971E+02     0.000000000E+00     0.000000000E+00
    44317     1.403908971E+02     0.000000000E+00     0.000000000E+00
-1
/com,*********** Elements for Body 1 'Asiento|PartBody' ***********
et,1,187
eblock,19,solid,,23861
(19i9)
        1        1        1        1        0        0        0        0       10        0        1     5997     6499     7318     7316    40310    42768    40319    40318
    42767    44315
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-1
/com,*********** Send User Defined Coordinate System(s) ***********
local,12,0,140.390897120086,0.,0.,0.,0.,-90.
csys,0
toffst,273.15,      ! Temperature offset from absolute zero
/com,*********** Set Reference Temperature ***********
tref,22.
/com,*********** Send Materials ***********
Temperature = 'TEMP' ! Temperature
MP,DENS,1,7.85e-09,	! tonne mm^-3
MP,ALPX,1,1.2e-05,	! C^-1
MP,C,1,434000000,	! mm^2 s^-2 C^-1
MP,KXX,1,60.5,	! tonne mm s^-3 C^-1
MP,RSVX,1,0.00017,	! ohm mm
MP,EX,1,200000,	! tonne s^-2 mm^-1
MP,NUXY,1,0.3,
MP,MURX,1,10000,

!************************* Model Summary ********************
!Asiento|PartBody,	Structural Steel,	matid,	1
!************************* End Model Summary ********************
/com,*********** Create Remote Point "Internal Remote Point 2" ***********
! -------- Remote Point Used by "Fixed - Ground To Asiento|PartBody" --------
*set,tid,3
*set,cid,2
et,cid,174
et,tid,170
keyo,tid,2,1               ! Don't fix the pilot node
keyo,tid,4,111111
keyo,cid,12,5              ! Bonded Contact
keyo,cid,4,2               ! Rigid CERIG style load
keyo,cid,2,2               ! MPC style contact
eblock,10,,,62
(15i9)
    35495        2        2        2        0     4228     1656     4231     4231    15774    15775     4231    30996
    35496        2        2        2        0     4230     1647     4232     4232    15719    15720     4232    31006
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-1
*set,_npilot,44317
_npilot117=_npilot
type,tid
mat ,cid
real,cid
tshape,pilo
en,35557,_npilot
tshape
csys,12
nrot,44317
csys,0
/com,*********** Create Joint "Fixed - Ground To Asiento|PartBody" ***********
! Joint Element Type Declaration and Definition using MPC184
*set,_jid,4
et,_jid,184
keyo,_jid,1,13          ! Fixed Joint
sectype,_jid, joint, weld, _wbjoint
secjoint,,12,12
mat,_jid
real,_jid
type,_jid
secnum,_jid
en,35492,,44317        ! body to ground joint
/com,*********** Define Force Using Surface Effect Elements ***********
local,13,0,0.,0.,0.,0.,0.,0.
csys,0
et,5,154
eblock,10,,,212
(15i9)
    35558        5        5        5       13      566     1390      567      567    10668    10673      567    10666
    35559        5        5        5       13      570     1394      571      571    10689    10693      571    10687
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-1
esel,s,type,,5
keyop,5,2,1         ! Apply load in local coordinate system
keyop,5,7,1         ! Use original area so load is constant in large deformation
esel,all
/com,*********** Define Force Using Surface Effect Elements ***********
local,14,0,0.,0.,0.,0.,0.,0.
csys,0
et,6,154
eblock,10,,,28
(15i9)
    35770        6        6        6       14      840     4623      839      839    12215    12209      839    12205
    35771        6        6        6       14     1688     1687     4623     4623    15934    15938     4623    15944
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-1
esel,s,type,,6
keyop,6,2,1         ! Apply load in local coordinate system
keyop,6,7,1         ! Use original area so load is constant in large deformation
esel,all
/com,*********** Define Force Using Surface Effect Elements ***********
local,15,0,0.,0.,0.,0.,0.,0.
csys,0
et,7,154
eblock,10,,,110
(15i9)
    35798        7        7        7       15      173      174     4669     4669     8293     8305     4669     8298
    35799        7        7        7       15      171      172     4668     4668     8274     8286     4668     8277
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-1
esel,s,type,,7
keyop,7,2,1         ! Apply load in local coordinate system
keyop,7,7,1         ! Use original area so load is constant in large deformation
esel,all
fini
/com,****************************************************************************
/com,*************************    SOLUTION       ********************************
/com,****************************************************************************
/solu
antype,0                   ! static analysis
_thickRatio=  1     ! Ratio of thick parts in the model
eqsl,pcg,1e-8,,,,,,1
cntr,print,1               ! print out contact info and also make no initial contact an error
cncheck,dmp		!	Enable program controlled contact splitting for distributed memory parallel run
dmpoption,emat,no             ! Don't combine emat file for DANSYS
dmpoption,esav,no             ! Don't combine esav file for DANSYS
nldiag,cont,iter           ! print out contact info each equilibrium iteration
rescontrol,,none                 ! Do not keep any restart files
/com,****************************************************
/com,******************* SOLVE FOR LS 1 OF 1 ****************
esel,s,type,,5
nsle
sfe,all,1,pres,1,0.
sfe,all,2,pres,1,0.
sfe,all,3,pres,1,-0.146073973798406
esel,s,type,,6
nsle
sfe,all,1,pres,1,0.
sfe,all,2,pres,1,1.07053794728436
sfe,all,3,pres,1,0.
esel,s,type,,7
nsle
sfe,all,1,pres,1,0.
sfe,all,2,pres,1,-0.212652819386533
sfe,all,3,pres,1,0.212652819386533
nsel,all
esel,all
nsub,1,1,1
time,1.
outres,erase
outres,all,none
outres,nsol,all,
outres,rsol,all
outres,eangl,all
outres,etmp,all
outres,veng,all
outres,strs,all,
outres,epel,all,
outres,eppl,all,
outres,cont,all,
esel,s,type,,4
cm,_elmisc,elem
esel,all
outres,misc,all,_elmisc
! *********** WB SOLVE COMMAND ***********
! check interactive state
*get,ANSINTER_,active,,int
*if,ANSINTER_,ne,0,then
/eof
*endif
solve
/com *************** Write FE CONNECTORS *********
CEWRITE,file,ce,,INTE
/com,****************************************************
/com,*************** FINISHED SOLVE FOR LS 1 *************
*get,_NSOLTHREADS,active,0,ntfs
*get,_NSOLPROCESSES,active,0,npfs
*get,_PCGITER,active,,solu,cgiter
/post1
fini
